<?xml version="1.0"?>
<?xml-stylesheet href="http://jsbsim.sourceforge.net/JSBSim.xsl" type="text/xsl"?>
<fdm_config name="rascal" version="2.0" release="BETA"
 xmlns:xsi="http://www.w3.org/2001/XMLSchema-instance"
 xsi:noNamespaceSchemaLocation="http://jsbsim.sourceforge.net/JSBSim.xsd">

    <fileheader>
        <author> Author Name </author>
        <filecreationdate> Creation Date </filecreationdate>
        <version> Version </version>
        <description> Models a rascal </description>
    </fileheader>

    <metrics>
        <wingarea unit="M2"> 0.957 </wingarea>
        <wingspan unit="M"> 4.32 </wingspan>
        <chord unit="M"> 0.221 </chord>
        <htailarea unit="FT2"> 1.69 </htailarea> <!-- Dont think this is important -->
        <htailarm unit="FT"> 3.28 </htailarm> <!-- Dont think this is important -->
        <vtailarea unit="FT2"> 1.06 </vtailarea> <!-- Dont think this is important -->
        <vtailarm unit="FT"> 0 </vtailarm> <!-- Dont think this is important -->
        <location name="AERORP" unit="IN">
            <x> 37.4 </x>
            <y> 0 </y>
            <z> 0 </z>
        </location>
        <location name="EYEPOINT" unit="IN">
            <x> 20 </x>
            <y> 0 </y>
            <z> 5 </z>
        </location>
        <location name="VRP" unit="IN">
            <x> 0 </x>
            <y> 0 </y>
            <z> 0 </z>
        </location>
    </metrics>

    <mass_balance>
        <ixx unit="KG*M2"> 1.6931 </ixx>
        <iyy unit="KG*M2"> 1.0708 </iyy>
        <izz unit="KG*M2"> 2.7281 </izz>
        <ixy unit="KG*M2"> 0 </ixy>
        <ixz unit="KG*M2"> 0.0826 </ixz>
        <iyz unit="KG*M2"> 0 </iyz>
        <emptywt unit="KG"> 5.443 </emptywt>
        <location name="CG" unit="IN"> <!-- Dont think this is important -->
            <x> 36.4 </x>
            <y> 0 </y>
            <z> 4 </z>
        </location>
    </mass_balance>

    <ground_reactions>
        <contact type="BOGEY" name="LEFT_MLG">
            <location unit="IN">
                <x> 33.1 </x>
                <y> -100.0 </y>
                <z> -8.1 </z>
            </location>
            <static_friction> 0.8 </static_friction>
            <dynamic_friction> 0.5 </dynamic_friction>
            <rolling_friction> 0.1 </rolling_friction>
            <spring_coeff unit="LBS/FT"> 20 </spring_coeff>
            <damping_coeff unit="LBS/FT/SEC"> 10 </damping_coeff>
            <max_steer unit="DEG"> 0.0 </max_steer>
            <brake_group> NONE </brake_group>
            <retractable>0</retractable>
        </contact>
        <contact type="BOGEY" name="RIGHT_MLG">
            <location unit="IN">
                <x> 33.1 </x>
                <y> 100.0 </y>
                <z> -8.1 </z>
            </location>
            <static_friction> 0.8 </static_friction>
            <dynamic_friction> 0.5 </dynamic_friction>
            <rolling_friction> 0.1 </rolling_friction>
            <spring_coeff unit="LBS/FT"> 20 </spring_coeff>
            <damping_coeff unit="LBS/FT/SEC"> 10 </damping_coeff>
            <max_steer unit="DEG"> 0.0 </max_steer>
            <brake_group> NONE </brake_group>
            <retractable>0</retractable>
        </contact>
        <contact type="BOGEY" name="TAIL_LG">
            <location unit="IN">
                <x> 68.9 </x>
                <y> 0 </y>
                <z> -1.6 </z>
            </location>
            <static_friction> 0.0 </static_friction>
            <dynamic_friction> 0.0 </dynamic_friction>
            <rolling_friction> 0.0 </rolling_friction>
            <spring_coeff unit="LBS/FT"> 10 </spring_coeff>
            <damping_coeff unit="LBS/FT/SEC"> 5 </damping_coeff>
            <max_steer unit="DEG"> 360.0 </max_steer>
            <brake_group> NONE </brake_group>
            <retractable>0</retractable>
        </contact>
    </ground_reactions>

    <propulsion>
        <engine file="electrical_engine_1050W">
            <location unit="IN">
                <x> 36 </x>
                <y> 0 </y>
                <z> 0 </z>
            </location>
            <orient unit="DEG">
                <roll> 0.0 </roll>
                <pitch> 0 </pitch>
                <yaw> 0 </yaw>
            </orient>
            <feed>0</feed>
            <thruster file="18x8">
                <location unit="IN">
                    <x> 1 </x>
                    <y> 0 </y>
                    <z> 0 </z>
                </location>
                <orient unit="DEG">
                    <roll> 0.0 </roll>
                    <pitch> 0.0 </pitch>
                    <yaw> 0.0 </yaw>
                </orient>
                <p_factor>1.0</p_factor>
            </thruster>
        </engine>
    </propulsion>

    <flight_control name="FCS: rascal">
     <channel name="All">

        <summer name="Pitch Trim Sum">
            <input>fcs/elevator-cmd-norm</input>
            <input>fcs/pitch-trim-cmd-norm</input>
            <clipto>
                <min>-1</min>
                <max>1</max>
            </clipto>
        </summer>

        <aerosurface_scale name="Elevator Control">
            <input>fcs/pitch-trim-sum</input>
            <range>
                <min>-0.35</min>
                <max>0.3</max>
            </range>
            <output>fcs/elevator-pos-rad</output>
        </aerosurface_scale>

        <aerosurface_scale name="Elevator Normalized">
            <input>fcs/elevator-pos-rad</input>
            <domain>
                <min>-0.3</min>
                <max> 0.3</max>
            </domain>
            <range>
                <min>-1</min>
                <max> 1</max>
            </range>
            <output>fcs/elevator-pos-norm</output>
        </aerosurface_scale>

        <summer name="Roll Trim Sum">
            <input>fcs/aileron-cmd-norm</input>
            <input>fcs/roll-trim-cmd-norm</input>
            <clipto>
                <min>-1</min>
                <max>1</max>
            </clipto>
        </summer>

        <aerosurface_scale name="Left Aileron Control">
            <input>fcs/roll-trim-sum</input>
            <range>
                <min>-0.35</min>
                <max>0.35</max>
            </range>
            <output>fcs/left-aileron-pos-rad</output>
        </aerosurface_scale>

        <aerosurface_scale name="Right Aileron Control">
            <input>-fcs/roll-trim-sum</input>
            <range>
                <min>-0.35</min>
                <max>0.35</max>
            </range>
            <output>fcs/right-aileron-pos-rad</output>
        </aerosurface_scale>

        <aerosurface_scale name="Left aileron Normalized">
            <input>fcs/left-aileron-pos-rad</input>
            <domain>
                <min>-0.35</min>
                <max> 0.35</max>
            </domain>
            <range>
                <min>-1</min>
                <max> 1</max>
            </range>
            <output>fcs/left-aileron-pos-norm</output>
        </aerosurface_scale>

        <aerosurface_scale name="Right aileron Normalized">
            <input>fcs/right-aileron-pos-rad</input>
            <domain>
                <min>-0.35</min>
                <max> 0.35</max>
            </domain>
            <range>
                <min>-1</min>
                <max> 1</max>
            </range>
            <output>fcs/right-aileron-pos-norm</output>
        </aerosurface_scale>

        <summer name="Rudder Command Sum">
            <input>fcs/rudder-cmd-norm</input>
            <input>fcs/yaw-trim-cmd-norm</input>
            <clipto>
                <min>-1</min>
                <max>1</max>
            </clipto>
        </summer>

        <aerosurface_scale name="Rudder Control">
            <input>fcs/rudder-command-sum</input>
            <range>
                <min>-0.35</min>
                <max>0.35</max>
            </range>
            <output>fcs/rudder-pos-rad</output>
        </aerosurface_scale>

        <aerosurface_scale name="Rudder Normalized">
            <input>fcs/rudder-pos-rad</input>
            <domain>
                <min>-0.35</min>
                <max> 0.35</max>
            </domain>
            <range>
                <min>-1</min>
                <max> 1</max>
            </range>
            <output>fcs/rudder-pos-norm</output>
        </aerosurface_scale>
     </channel>
    </flight_control>

    <aerodynamics>
        <axis name="DRAG">
            <function name="aero/coefficient/CD0">
                <description>Drag_at_zero_lift</description>
                <product>
                    <property>aero/qbar-psf</property>
                    <property>metrics/Sw-sqft</property>
                    <value>0.017</value>
                </product>
            </function>
            <function name="aero/coefficient/CDi">
                <description>Induced_drag</description>
                <!-- <product>
                    <property>aero/qbar-psf</property>
                    <property>metrics/Sw-sqft</property>
                    <property>aero/cl-squared</property>
                    <value>0.0180</value>
                </product> -->
                <product>
                    <property>aero/qbar-psf</property>
                    <property>metrics/Sw-sqft</property>
                    <sum>
                        <product>
                            <value>0.018</value>
                            <pow>
                                <sum>
                                    <value>0.6483</value>
                                    <product>
                                        <value>6.4854</value>
                                        <property>aero/alpha-rad</property>
                                    </product>
                                </sum>
                                <value>2</value>
                            </pow>
                        </product>
                        <product>
                            <value>0-0.003583</value>
                            <sum>
                                <value>0.6483</value>
                                <product>
                                    <value>6.4854</value>
                                    <property>aero/alpha-rad</property>
                                </product>
                            </sum>
                        </product>
                        <value>0.00128</value>
                    </sum>
                </product>
            </function>
            <function name="aero/coefficient/CDde">
                <description>Drag_due_to_Elevator_Deflection</description>
                <product>
                    <property>aero/qbar-psf</property>
                    <property>metrics/Sw-sqft</property>
                    <property>fcs/elevator-pos-rad</property>
                    <value>0.02925</value>
                </product>
            </function>
            <function name="aero/coefficient/CDda">
                <description>Drag_due_to_Aileron_Deflection</description>
                <product>
                    <property>aero/qbar-psf</property>
                    <property>metrics/Sw-sqft</property>
                    <property>fcs/left-aileron-pos-rad</property>
                    <value>0.02367</value>
                </product>
            </function>
            <function name="aero/coefficient/CDdr">
                <description>Drag_due_to_Rudder_Deflection</description>
                <product>
                    <property>aero/qbar-psf</property>
                    <property>metrics/Sw-sqft</property>
                    <property>fcs/rudder-pos-rad</property>
                    <value>0.01391</value>
                </product>
            </function>
        </axis>

        <axis name="SIDE">
            <function name="aero/coefficient/CYb">
                <description>Side_force_due_to_beta</description>
                <product>
                    <property>aero/qbar-psf</property>
                    <property>metrics/Sw-sqft</property>
                    <property>aero/beta-rad</property>
                    <value>-0.2527</value>
                </product>
            </function>
            <function name="aero/coefficient/CYp">
                <description>Side_force_due_to_pitch_rate</description>
                <product>
                    <property>aero/qbar-psf</property>
                    <property>metrics/Sw-sqft</property>
                    <property>velocities/p-aero-rad_sec</property>
                    <value>-0.2929</value>
                </product>
            </function>
            <function name="aero/coefficient/CYr">
                <description>Side_force_due_to_yaw_rate</description>
                <product>
                    <property>aero/qbar-psf</property>
                    <property>metrics/Sw-sqft</property>
                    <property>velocities/r-aero-rad_sec</property>
                    <value>0.1497</value>
                </product>
            </function>
            <function name="aero/coefficient/CYda">
                <description>Side_force_due_to_aileron_deflection</description>
                <product>
                    <property>aero/qbar-psf</property>
                    <property>metrics/Sw-sqft</property>
                    <property>fcs/left-aileron-pos-norm</property>
                    <value>-0.1358</value>
                </product>
            </function>
            <function name="aero/coefficient/CYdr">
                <description>Side_force_due_to_rudder_deflection</description>
                <product>
                    <property>aero/qbar-psf</property>
                    <property>metrics/Sw-sqft</property>
                    <property>fcs/rudder-pos-norm</property>
                    <value>-0.1472</value>
                </product>
            </function>
        </axis>

        <axis name="LIFT">
            <function name="aero/coefficient/CL0">
                <description>Lift_at_zero_angle_of_attack</description>
                <product>
                    <property>aero/qbar-psf</property>
                    <property>metrics/Sw-sqft</property>
                    <value>0.6483</value>
                </product>
            </function>
            <function name="aero/coefficient/CLalpha">
                <description>Lift_due_to_alpha</description>
                <product>
                    <property>aero/qbar-psf</property>
                    <property>metrics/Sw-sqft</property>
                    <property>aero/alpha-rad</property>
                    <value>6.4854</value>
                </product>
            </function>
            <function name="aero/coefficient/CLq">
                <description>Lift_due_to_Elevator_Deflection</description>
                <product>
                    <property>aero/qbar-psf</property>
                    <property>metrics/Sw-sqft</property>
                    <property>velocities/q-aero-rad_sec</property>
                    <value>11.5476</value>
                </product>
            </function>
            <function name="aero/coefficient/CLde">
                <description>Lift_due_to_Elevator_Deflection</description>
                <product>
                    <property>aero/qbar-psf</property>
                    <property>metrics/Sw-sqft</property>
                    <property>fcs/elevator-pos-rad</property>
                    <value>0.4561</value>
                </product>
            </function>
        </axis>

        <axis name="ROLL">
            <function name="aero/coefficient/Clb">
                <description>Roll_moment_due_to_beta</description>
                <!-- aka dihedral effect -->
                <product>
                    <property>aero/qbar-psf</property>
                    <property>metrics/Sw-sqft</property>
                    <property>metrics/bw-ft</property> <!-- Not sure if should be span or cord -->
                    <property>aero/beta-rad</property>
                    <value>-0.1797</value>
                </product>
            </function>
            <function name="aero/coefficient/Clp">
                <description>Roll_moment_due_to_roll_rate</description>
                <product>
                    <property>aero/qbar-psf</property>
                    <property>metrics/Sw-sqft</property>
                    <property>metrics/bw-ft</property>
                    <property>aero/bi2vel</property> <!-- Not sure how this coeficent is normalized -->
                    <property>velocities/p-aero-rad_sec</property>
                    <value>-0.7261</value>
                </product>
            </function>
            <function name="aero/coefficient/Clr">
                <description>Roll_moment_due_to_yaw_rate</description>
                <product>
                    <property>aero/qbar-psf</property>
                    <property>metrics/Sw-sqft</property>
                    <property>metrics/bw-ft</property>
                    <property>aero/bi2vel</property> <!-- Not sure how this coeficent is normalized -->
                    <property>velocities/r-aero-rad_sec</property>
                    <value>0.186</value>
                </product>
            </function>
            <function name="aero/coefficient/Clda">
                <description>Roll_moment_due_to_aileron</description>
                <product>
                    <property>aero/qbar-psf</property>
                    <property>metrics/Sw-sqft</property>
                    <property>metrics/bw-ft</property> <!-- Not sure how this coeficent is normalized -->
                    <property>fcs/left-aileron-pos-rad</property>
                    <value>-0.3131</value>
                </product>
            </function>
            <function name="aero/coefficient/Cldr">
                <description>Roll_moment_due_to_rudder</description>
                <product>
                    <property>aero/qbar-psf</property>
                    <property>metrics/Sw-sqft</property>
                    <property>metrics/bw-ft</property> <!-- Not sure how this coeficent is normalized -->
                    <property>fcs/rudder-pos-rad</property>
                    <value>-0.00518</value>
                </product>
            </function>
        </axis>

        <axis name="PITCH">
            <function name="aero/coefficient/Cm0"> <!-- Not sure about this one -->
                <description>Pitch_moment_at_zero_alpha</description>
                <product>
                    <property>aero/qbar-psf</property>
                    <property>metrics/Sw-sqft</property>
                    <property>metrics/cbarw-ft</property> <!-- Not sure how this coeficent is normalized -->
                    <value>-0.07792</value>
                </product>
            </function>
            <function name="aero/coefficient/Cmalpha">
                <description>Pitch_moment_due_to_alpha</description>
                <product>
                    <property>aero/qbar-psf</property>
                    <property>metrics/Sw-sqft</property>
                    <property>metrics/cbarw-ft</property> <!-- Not sure how this coeficent is normalized -->
                    <property>aero/alpha-rad</property>
                    <value>-1.6427</value>
                </product>
            </function>
            <function name="aero/coefficient/Cmde">
                <description>Pitch_moment_due_to_elevator</description>
                <product>
                    <property>aero/qbar-psf</property>
                    <property>metrics/Sw-sqft</property>
                    <property>metrics/cbarw-ft</property> <!-- Not sure how this coeficent is normalized -->
                    <property>fcs/elevator-pos-rad</property>
                    <value>-2.1075</value>
                </product>
            </function>
            <function name="aero/coefficient/Cmq">
                <description>Pitch_moment_due_to_pitch_rate</description>
                <product>
                    <property>aero/qbar-psf</property>
                    <property>metrics/Sw-sqft</property>
                    <property>metrics/cbarw-ft</property> <!-- Not sure how this coeficent is normalized -->
                    <property>aero/ci2vel</property> <!-- Not sure how this coeficent is normalized -->
                    <property>velocities/q-aero-rad_sec</property>
                    <value>-23.5033</value>
                </product>
            </function>
        </axis>

        <axis name="YAW">
            <function name="aero/coefficient/Cnb">
                <description>Yaw_moment_due_to_beta</description>
                <product>
                    <property>aero/qbar-psf</property>
                    <property>metrics/Sw-sqft</property>
                    <property>metrics/bw-ft</property> <!-- Not sure how this coeficent is normalized -->
                    <property>aero/beta-rad</property>
                    <value>0.0267</value>
                </product>
            </function>
            <function name="aero/coefficient/Cnp">
                <description>Yaw_moment_due_to_pitch_rate</description>
                <product>
                    <property>aero/qbar-psf</property>
                    <property>metrics/Sw-sqft</property>
                    <property>metrics/bw-ft</property> <!-- Not sure if using span or cord is right here-->
                    <property>velocities/p-aero-rad_sec</property>
                    <value>-0.067726</value>
                </product>
            </function>
            <function name="aero/coefficient/Cnr">
                <description>Yaw_moment_due_to_yaw_rate</description>
                <product>
                    <property>aero/qbar-psf</property>
                    <property>metrics/Sw-sqft</property>
                    <property>metrics/bw-ft</property> <!-- Not sure how this coeficent is normalized -->
                    <property>aero/bi2vel</property> <!-- Not sure how this coeficent is normalized -->
                    <property>velocities/r-aero-rad_sec</property>
                    <value>-0.03438</value>
                </product>
            </function>
            <function name="aero/coefficient/Cnda">
                <description>Adverse_yaw</description>
                <product>
                    <property>aero/qbar-psf</property>
                    <property>metrics/Sw-sqft</property>
                    <property>metrics/bw-ft</property> <!-- Not sure how this coeficent is normalized -->
                    <property>fcs/left-aileron-pos-rad</property>
                    <value>-0.0124</value>
                </product>
            </function>
            <function name="aero/coefficient/Cndr">
                <description>Yaw_moment_due_to_rudder</description>
                <product>
                    <property>aero/qbar-psf</property>
                    <property>metrics/Sw-sqft</property>
                    <property>metrics/bw-ft</property> <!-- Not sure how this coeficent is normalized -->
                    <property>fcs/rudder-pos-rad</property>
                    <value>0.04098</value>
                </product>
            </function>
        </axis>
    </aerodynamics>
</fdm_config>
